// COMSOL Multiphysics 5.2.0.166 model "spintronic_transient.mph"
// Outline of the model tree

Functions
  an1: Analytic "Drift (Velocity) Term (X-Component)"
    funcname = vel_eqn_0
    expr = llg_precess_0(m0, m1, m2, Heff0, Heff1, Heff2) + alphaFac*llg_damp_0(m0, m1, m2, Heff0, Heff1, Heff2)
    args = {m0, m1, m2, Heff0, Heff1, Heff2, alphaFac}
    argunit = m, m, m, A/m, A/m, A/m, 1
    fununit = A/m
  an2: Analytic "Drift (Velocity) Term (Y-Component)"
    funcname = vel_eqn_1
    expr = llg_precess_1(m0, m1, m2, Heff0, Heff1, Heff2) + alphaFac*llg_damp_1(m0, m1, m2, Heff0, Heff1, Heff2)
    args = {m0, m1, m2, Heff0, Heff1, Heff2, alphaFac}
    argunit = m, m, m, A/m, A/m, A/m, 1
    fununit = A/m
  an3: Analytic "Drift (Velocity) Term (Z-Component)"
    funcname = vel_eqn_2
    expr = llg_precess_2(m0, m1, m2, Heff0, Heff1, Heff2) + alphaFac*llg_damp_2(m0, m1, m2, Heff0, Heff1, Heff2)
    args = {m0, m1, m2, Heff0, Heff1, Heff2, alphaFac}
    argunit = m, m, m, A/m, A/m, A/m, 1
    fununit = A/m
  an4: Analytic "LLG Precession Torque (X-Component)" | funcname = llg_precess_0; expr = H1*m2-H2*m1; args = {m0, m1, m2, H0, H1, H2}; argunit = m, m, m, A/m, A/m, A/m; fununit = A/m
  an5: Analytic "LLG Precession Torque (Y-Component)" | funcname = llg_precess_1; expr = H2*m0-H0*m2; args = {m0, m1, m2, H0, H1, H2}; argunit = m, m, m, A/m, A/m, A/m; fununit = A/m
  an6: Analytic "LLG Precession Torque (Z-Component)" | funcname = llg_precess_2; expr = H0*m1-H1*m0; args = {m0, m1, m2, H0, H1, H2}; argunit = m, m, m, A/m, A/m, A/m; fununit = A/m
  an7: Analytic "LLG Damping Torque (X-Component)" | funcname = llg_damp_0; expr = H0 - m0*(H0*m0+H1*m1+H2*m2); args = {m0, m1, m2, H0, H1, H2}; argunit = m, m, m, A/m, A/m, A/m; fununit = A/m
  an8: Analytic "LLG Damping Torque (Y-Component)" | funcname = llg_damp_1; expr = H1 - m1*(H0*m0+H1*m1+H2*m2); args = {m0, m1, m2, H0, H1, H2}; argunit = m, m, m, A/m, A/m, A/m; fununit = A/m
  an9: Analytic "LLG Damping Torque (Z-Component)" | funcname = llg_damp_2; expr = H2 - m2*(H0*m0+H1*m1+H2*m2); args = {m0, m1, m2, H0, H1, H2}; argunit = m, m, m, A/m, A/m, A/m; fununit = A/m
  an10: Analytic "Vector Dot Product" | funcname = uax_vec_dot; expr = (x*ux+y*uy+z*uz)/((ux*ux+uy*uy+uz*uz)*sqrt(x*x+y*y+z*z)); args = {x, y, z, ux, uy, uz}; argunit = m, m, m, 1, 1, 1; fununit = 1

Variables
  var1 "Global Variables"
    mu0 = mu0_const
    hbar = hbar_const
    gyroRatio = 2.215e5[rad*s^(-1)*T^(-1)]
  var2 "Uniaxial Anisotropy Variables"
    uax_0 = 0
    uax_1 = 0
    uax_2 = 1
    Ku2 = 44[m^(-3)]*kBT
    Huni = 2*Ku2/(mu0*Msat)
    Huax_0 = Huni*uax_0*uax_vec_dot(x, y, z, uax_0, uax_1, uax_2)
    Huax_1 = Huni*uax_1*uax_vec_dot(x,y,z,uax_0,uax_1,uax_2)
    Huax_2 = Huni*uax_2*uax_vec_dot(x,y,z,uax_0,uax_1,uax_2)
    uni_torque_0 = (gamFac/(1+dampFac*dampFac))*(llg_precess_0(x,y,z,Huax_0,Huax_1,Huax_2)+dampFac*llg_damp_0(x,y,z,Huax_0,Huax_1,Huax_2))
    uni_torque_1 = (gamFac/(1+dampFac*dampFac))*(llg_precess_1(x,y,z,Huax_0,Huax_1,Huax_2)+dampFac*llg_damp_1(x,y,z,Huax_0,Huax_1,Huax_2))
    uni_torque_2 = (gamFac/(1+dampFac*dampFac))*(llg_precess_2(x,y,z,Huax_0,Huax_1,Huax_2)+dampFac*llg_damp_2(x,y,z,Huax_0,Huax_1,Huax_2))
  var3 "Local Variables"
    Temperature = 300[K]
    kBT = k_B_const*Temperature
    Msat = 800e3 [A/m]
    gamFac = gyroRatio*mu0_const
    dampFac = 0.03 [1]
    L_width = 50e-9[m]
    L_length = 50e-9[m]
    L_thick = 2e-9[m]
    mag_Vol = L_width*L_length*L_thick
    diffCoeff = 2.0[1]*dampFac*gamFac*kBT/(mu0*Msat*mag_Vol*(1+dampFac*dampFac))
    vel_eqn0 = uni_torque_0
    vel_eqn1 = uni_torque_1
    vel_eqn2 = uni_torque_2
  var4 "Demagnetization Variables"
    Nxx = 0
    Nyy = 0
    Nzz = 0
    Hdemag_x = Nxx*uax_vec_dot(x, y, z, 1, 0, 0)
    Hdemag_y = Nyy*uax_vec_dot(x, y, z, 1, 1, 0)
    Hdemag_z = Nzz*uax_vec_dot(x, y, z, 0, 0, 1)

Geometry
  geom1 "MainGeometry" (3D, length unit m)
    sph1: Sphere "StateSpace" | type = surface; r = 1
    fin: Finalize "Form Union"

Physics
  w: WeakFormPDE on all domains
    dependent variable rho
    wfeq1: WeakFormPDE (default)
      weak = rhot*test(rho)-rho*(vel_eqn0*test(rhox)+vel_eqn1*test(rhoy)+vel_eqn2*(rhoz)))+diffCoeff*(rhox*test(rhox)+rhoy*test(rhoy)+rhoz*test(rhoz))
    zflx1: ZeroFluxBoundary "Zero Flux 1" (default)
    init1: init "Initial Values 1" (default) | rho = 1.0/(4.0*pi)

Mesh
  mesh1 "SphereMesh"
    size: MeshSizeDefault | hmax = 0.11; hauto = 3; custom = off
    ftri1: FreeTri "Free Triangular 1" on entire geometry

Studies
  std1 "Study 1"
    time: Transient "Time Dependent" | tunit = ns; tlist = range(0,10/1000,10); rtol = 1e-12

Solver configurations
  sol1 "Solution 1" (study std1)
    v1: Variables "Dependent Variables 1"
    t1: Time "Time-Dependent Solver 1" | tlist = range(0,10/1000,10)
      dDef: Direct
      fc1: FullyCoupled | linsolver = dDef

Datasets
  dset1: Solution | solution = sol1

Plots
  pg1: PlotGroup3D "3D Plot Group 1" | data = dset1
    mesh1: Mesh